# OpenSim document version 30000
Model:
  length_units: meters
  force_units: N
  gravity: 0 -9.80665 0
  credits:
    Frank Anderson, Peter Loan, Ayman Habib, Ajay Seth, Michael Sherman
  BodySet:
    Body ground: mass=0 mass_center=(0 0 0) inertia_xx=1 inertia_yy=1 inertia_zz=1
    Body humerus: mass=1 mass_center=(0 0 0) inertia_xx=0 inertia_yy=0 inertia_zz=0
      PinJoint shoulder: parent_body=ground location_in_parent=(0 0 0) location=(-1 0 0)
        Coordinate shoulder_coord_0: motion_type=rotational
    Body radius: mass=1 mass_center=(0 0 0) inertia_xx=0 inertia_yy=0 inertia_zz=0
      PinJoint elbow: parent_body=humerus location_in_parent=(0 0 0) location=(-1 0 0)
        Coordinate elbow_coord_0: motion_type=rotational
  ForceSet:
    PathActuator muscle1L:
      PathPoint point1: ground (-0.1 -0.1 0)
      ConditionalPathPoint pp1L2: ground (-0.1 0.1 0) range=(-inf 1.5708) coordinate=shoulder_coord_0
      ConditionalPathPoint pp1L3: ground (0.1 0.1 0) range=(-inf 0) coordinate=shoulder_coord_0
      ConditionalPathPoint pp1L4: ground (0.1 -0.1 0) range=(-inf -1.5708) coordinate=shoulder_coord_0
      PathPoint point5: humerus (-0.3 0.1 0)
    PathActuator muscle1R:
      PathPoint point1: ground (-0.1 0.1 0)
      ConditionalPathPoint pp1R2: ground (-0.1 -0.1 0) range=(-1.5708 inf) coordinate=shoulder_coord_0
      ConditionalPathPoint pp1R3: ground (0.1 -0.1 0) range=(0 inf) coordinate=shoulder_coord_0
      ConditionalPathPoint pp1R4: ground (0.1 0.1 0) range=(1.5708 inf) coordinate=shoulder_coord_0
      PathPoint point5: humerus (-0.3 -0.1 0)
    PathActuator muscle2L:
      PathPoint point1: humerus (-0.1 -0.1 0)
      ConditionalPathPoint pp2L2: humerus (-0.1 0.1 0) range=(-inf 1.5708) coordinate=elbow_coord_0
      ConditionalPathPoint pp2L3: humerus (0.1 0.1 0) range=(-inf 0) coordinate=elbow_coord_0
      ConditionalPathPoint pp2L4: humerus (0.1 -0.1 0) range=(-inf -1.5708) coordinate=elbow_coord_0
      PathPoint point5: radius (-0.3 0.1 0)
    PathActuator muscle2R:
      PathPoint point1: humerus (-0.1 0.1 0)
      ConditionalPathPoint pp2R2: humerus (-0.1 -0.1 0) range=(-1.5708 inf) coordinate=elbow_coord_0
      ConditionalPathPoint pp2R3: humerus (0.1 -0.1 0) range=(0 inf) coordinate=elbow_coord_0
      ConditionalPathPoint pp2R4: humerus (0.1 0.1 0) range=(1.5708 inf) coordinate=elbow_coord_0
      PathPoint point5: radius (-0.3 -0.1 0)
